// SBML level 3 version 1

model main()

  // Compartments:
  compartment compartmentOne = 1;

  // Species:
  species SimData_1 in compartmentOne = 1;
  species SimData_2 in compartmentOne = 1;
  species SimData_3 in compartmentOne = 1;

  // Parameters:
  I = 1;
  k_1 = 4.2416;
  k_2 = 5.9816;
  k_3 = 0.1009;
  k_4 = 1.1549;
  k_5 = 1.3618;
  k_6 = 1.4219;
  k_7 = 0.0051;
  k_8 = 0.0972;
  k_9 = 0.0012;
  k_10 = 56.8583;
  k_11 = 0.0111;
  k_12 = 0.0014;

  // Reactions:
  J1: SimData_1 => 2 SimData_1; SimData_1*I*k_1/(SimData_1 + k_7);
  J2: SimData_1 => ; SimData_1*k_2/(SimData_1 + k_8);
  J3: SimData_1 + SimData_2 => SimData_1 + 2 SimData_2; SimData_2*SimData_1*k_3/(SimData_2 + k_9);
  J4: SimData_2 => ; SimData_2*k_4/(SimData_2 + k_10);
  J5: SimData_1 + SimData_3 => SimData_1 + 2 SimData_3; SimData_3*SimData_1*k_5/(SimData_3 + k_11);
  J6: SimData_2 + SimData_3 => SimData_2; SimData_3*SimData_2*k_6/(SimData_3 + k_12);
end
