// SBML level 2 version 2

model algebraicRules_basic()

  // Compartments:
  compartment cell = 1;

  // Species:
  species x in cell;

  // Parameters:
  k has metre;
  k1 has metre;
  k2 has m_per_sec;
  k3 has volt_sq;
  k4 = ;
  k5 = ;
  k6 = ;
  k7 = ;
  k8 = ;
  k9 = ;
  k10 = ;
  k11 = ;
  k12 = ;
  k13 = ;
  k14 = ;
  k15 = ;
  k16 = ;
  t = 1 second;

  // Rate rules:
  k16' = 1 + 6;
  k4' = cos(1.57);
  k5' = acos(0.5);
  k6' = k + k1;
  k7' = k^2;
  k8' = k*k2;
  k9' = k/k2;
  k10' = piecewise(k, k2 >= 4, k1);
  k11' = sqrt(2);
  k12' = k4*k1;
  k13' = k4 + delay(k1, t*0.1);
  k14' = k4*(k4 + k1);
  k15' = k1 + k4;

  // Constraints:
  constraint true && true;

  // Unit definitions:
  unit m_per_sec = metre / second;
  unit volt_sq = volt^2;
end
